// SBML level 3 version 1

function conc(q, vol)
  piecewise(q/vol, vol > 1e-5, 0);
end

function metab_MM(Vmax, Km, PC, q, vol)
  vol*Vmax*conc(q, vol)/(PC*Km + conc(q, vol));
end

function metab_MA(CLH, PC, q, vol)
  CLH*conc(q, vol)/PC;
end

model euromix()

  // Compartments:
  compartment default_compartment = 1;  // SBO:0000290
  compartment Fat;  // UBERON:0001013
  compartment Rich;  // UBERON:0000479
  compartment pp;  // UBERON:0000479
  compartment liver;  // UBERON:0002107
  compartment gut = 1;  // UBERON:0001555
  compartment su;  // UBERON:0002097
  compartment se;  // UBERON:0002097
  compartment scu;  // UBERON:0002097
  compartment sce;  // UBERON:0002097
  compartment Art;  // UBERON:0013755
  compartment Ven;  // UBERON:0013756

  // Species:
  substanceOnly species QFat in Fat = 0;  // SBO:0000234
  substanceOnly species QRich in Rich = 0;  // SBO:0000235
  substanceOnly species QPoor in pp = 0;  // SBO:0000236
  substanceOnly species QLiver in liver = 0;  // SBO:0000237
  substanceOnly species QMetab in liver = 0;  // SBO:0000238
  substanceOnly species QGut in gut = 0;  // SBO:0000239
  substanceOnly species QSkin_u in su = 0;  // SBO:0000240
  substanceOnly species QSkin_e in se = 0;  // SBO:0000241
  substanceOnly species QSkin_sc_u in scu = 0;  // SBO:0000242
  substanceOnly species QSkin_sc_e in sce = 0;  // SBO:0000243
  substanceOnly species QArt in Art = 0;  // SBO:0000244
  substanceOnly species QVen in Ven = 0;  // SBO:0000245
  substanceOnly species QExcret in default_compartment = 0;  // SBO:0000246
  species QAir in default_compartment = 0;  // SBO:0000247

  // Parameters:
  BM = 70;  // NCIT:C81328
  BSA = 190;  // NCIT:C25157
  Height_sc = 0.0001;  // OBA:VT0001200
  Height_vs = 0.0122;  // OBA:VT0001200
  scVFat = 0.209;  // UO:0000191
  scVRich = 0.105;  // UO:0000192
  scVLiver = 0.024;  // UO:0000193
  scVBlood = 0.068;  // UO:0000194
  scFBlood = 4.8;  // OBA:VT0000182
  scFFat = 0.085;  // UO:0000194
  scFPoor = 0.12;  // UO:0000194
  scFLiver = 0.27;  // UO:0000194
  scFSkin = 0.05;  // UO:0000194
  Falv = 2220;  // NCIT:C94967
  PCFat = 2.53;  // NCIT:C20610
  PCLiver = 0.923;  // NCIT:C20610
  PCRich = 0.875;  // NCIT:C20610
  PCPoor = 0.647;  // NCIT:C20610
  PCSkin_sc = 0.889;  // NCIT:C20610
  PCSkin = 0.889;  // NCIT:C20610
  PCAir = 1e99;  // NCIT:C20610
  Km = 0;  // SBO:0000027
  Michaelis = 0;  // STATO:0000034
  Vmax = 0;  // SBO:0000186
  fub = 0.51;  // PKPBO:00134
  fSA_exposed = 0.1;  // UO:0000194
  Kp_sc_vs = 0.01;  // SBO:0000491
  kGut = 1;  // PKPBO:00126
  CLH = 132;  // PKPBO:00215
  Ke = 7.5;  // PKPBO:00218

  // Assignment rules:
  Fat := VFat;
  Rich := VRich;
  pp := VPoor;
  liver := VLiver;
  su := VSkin_u;
  se := VSkin_e;
  scu := VSkin_sc_u;
  sce := VSkin_sc_e;
  Art := VArt;
  Ven := VVen;
  VFat := BM*scVFat;
  VRich := BM*scVRich;
  VLiver := BM*scVLiver;
  VBlood := BM*scVBlood;
  VArt := VBlood/3;
  VVen := VBlood - VArt;
  VSkin_e := BSA*Height_vs*fSA_exposed;
  VSkin_u := BSA*Height_vs*(1 - fSA_exposed);
  VSkin_sc_e := BSA*Height_sc*fSA_exposed;
  VSkin_sc_u := BSA*Height_sc*(1 - fSA_exposed);
  VPoor := BM - VFat - VRich - VLiver - VSkin_e - VSkin_u - VSkin_sc_e - VSkin_sc_u - VBlood - 0.1*BM;
  f_su := Kp_sc_vs*BSA*(1 - fSA_exposed);
  f_se := Kp_sc_vs*BSA*fSA_exposed;
  FBlood := scFBlood*BM;
  FFat := FBlood*scFFat;
  FPoor := FBlood*scFPoor;
  FLiver := FBlood*scFLiver;
  FSkin := FBlood*scFSkin;
  FRich := FBlood - FFat - FPoor - FLiver - FSkin;
  FSkin_e := FSkin*fSA_exposed;
  FSkin_u := FSkin - FSkin_e;

  // Reactions:
  _J0: QArt -> QFat; FFat*conc(QArt, Art);
  _J1: QFat -> QVen; FFat*conc(QFat, Fat)/PCFat;
  _J2: QArt -> QRich; FRich*conc(QArt, Art);
  _J3: QRich -> QVen; FRich*conc(QRich, Rich)/PCRich;
  _J4: QArt -> QPoor; FPoor*conc(QArt, Art);
  _J5: QPoor -> QVen; FPoor*conc(QPoor, pp)/PCPoor;
  _J6: QArt -> QLiver; FLiver*conc(QArt, Art);
  _J7: QLiver -> QVen; FLiver*conc(QLiver, liver)/PCLiver;
  _J8: QGut -> QLiver; kGut*QGut;
  _J9: QArt -> QSkin_u; FSkin_u*conc(QArt, Art);
  _J10: QSkin_u -> QVen; FSkin_u*conc(QSkin_u, su)/PCSkin;
  _J11: QSkin_u -> QSkin_sc_u; f_su*conc(QSkin_u, su)/PCSkin_sc;
  _J12: QSkin_sc_u -> QSkin_u; f_su*conc(QSkin_sc_u, scu);
  _J13: QArt -> QSkin_e; FSkin_e*conc(QArt, Art);
  _J14: QSkin_e -> QVen; FSkin_e*conc(QSkin_e, se)/PCSkin;
  _J15: QSkin_e -> QSkin_sc_e; f_se*conc(QSkin_e, se)/PCSkin_sc;
  _J16: QSkin_sc_e -> QSkin_e; f_se*conc(QSkin_sc_e, sce);
  _J17: QVen -> QArt; FBlood*conc(QVen, Ven);
  _J18: QLiver -> QMetab; fub*piecewise(metab_MM(Vmax, Km, PCLiver, QLiver, liver), Michaelis > 0.5, metab_MA(CLH, PCLiver, QLiver, liver));
  _J19: QArt -> QAir; Falv*conc(QArt, Art)/PCAir;
  _J20: QArt -> QExcret; Ke*fub*conc(QArt, Art);
end
