// SBML level 3 version 2

function conc(q, vol)
  piecewise(q/vol, vol > 0, 0);
end

function metab_MM(Vmax, Km, PC, q, vol)
  vol*Vmax*conc(q, vol)/(PC*Km + conc(q, vol));
end

function metab_MA(CLH, PC, q, vol)
  CLH*conc(q, vol)/PC;
end

model euromix()
  // hasTaxon taxonomy:40674
  // model units - substance: MilliMOL, time: HR, volume: L, extent: MilliMOL

  // Compartments:
  compartment Air = 1 L; Air is "alveolar air";
  compartment Urine = 1 L; Urine is "urine";
  compartment Fat; Fat has L; Fat is "adipose tissue";
  compartment Rich; Rich has L; Rich is "richly perfused tissue";
  compartment Liver; Liver has L; Liver is "liver";
  compartment Art; Art has L; Art is "arterial blood";
  compartment Ven; Ven has L; Ven is "venous blood";
  compartment Skin_e; Skin_e has L; Skin_e is "viable epidermis exposed skin";
  compartment Skin_u; Skin_u has L; Skin_u is "viable epidermis unexposed skin";
  compartment Skin_sc_e; Skin_sc_e has L; Skin_sc_e is "stratum corneum exposed skin";
  compartment Skin_sc_u; Skin_sc_u has L; Skin_sc_u is "stratum corneum unexposed skin";
  compartment Poor; Poor has L; Poor is "poorly perfused tissue";
  compartment Gut = 1 L; Gut is "gut";

  // Species:
  substanceOnly species QFat in Fat = 0; QFat is "amount of chemical in fat tissues";  // SBO:0000247
  substanceOnly species QRich in Rich = 0; QRich is "amount of chemical in richly tissues";  // SBO:0000247
  substanceOnly species QPoor in Poor = 0; QPoor is "amount of chemical in poor tissues";  // SBO:0000247
  substanceOnly species QLiver in Liver = 0; QLiver is "amount of chemical in liver";  // SBO:0000247
  substanceOnly species QMetab in Liver = 0; QMetab is "amount of chemical metabolized (cumulated)";  // CHEBI:25212
  substanceOnly species QGut in Gut = 0; QGut is "amount of chemical in gut lumen";  // SBO:0000247
  substanceOnly species QSkin_u in Skin_u = 0; QSkin_u is "amount of chemical in viable epidermis of unexposed skin";  // SBO:0000247
  substanceOnly species QSkin_e in Skin_e = 0; QSkin_e is "amount of chemical in viable epidermis of exposed skin";  // SBO:0000247
  substanceOnly species QSkin_sc_u in Skin_sc_u = 0; QSkin_sc_u is "amount of chemical in skin stratum corneum of unexposed skin";  // SBO:0000247
  substanceOnly species QSkin_sc_e in Skin_sc_e = 0; QSkin_sc_e is "amount of chemical in skin stratum corneum of exposed skin";  // SBO:0000247
  substanceOnly species QArt in Art = 0; QArt is "amount of chemical in arterial blood";  // SBO:0000247
  substanceOnly species QVen in Ven = 0; QVen is "amount of chemical in venous blood";  // SBO:0000247
  substanceOnly species QExcret in Urine = 0; QExcret is "amount of chemical excreted in urine (cumulated)";
  substanceOnly species QAir in Air = 0; QAir is "amount of chemical in alveolar air";  // SBO:0000247

  // Parameters:
  BM = 70 KiloGM; BM is "body weight";
  BSA = 190 DeciM2; BSA is "body surface area";
  scVFat = 0.209 L_PER_KiloGM; scVFat is "fat volume as fraction of total body weight";
  scVRich = 0.105 L_PER_KiloGM; scVRich is "richly perfused tissues volume as fraction of total body weight";
  scVLiver = 0.024 L_PER_KiloGM; scVLiver is "liver volume as fraction of total body weight";
  scVBlood = 0.068 L_PER_KiloGM; scVBlood is "blood volume as fraction of total body weight";
  scVArt = 0.3333333 UNITLESS; scVArt is "arterial blood volume as fraction of total blood volume";
  scFBlood = 4.8 L_PER_KiloGM_HR; scFBlood is "total blood flow per unit mass";
  scFFat = 0.085 UNITLESS; scFFat is "fraction of blood flow going to adipose tissue";
  scFPoor = 0.12 UNITLESS; scFPoor is "fraction total blood flow going to poorly perfused tissue";
  scFLiver = 0.27 UNITLESS; scFLiver is "fraction total blood flow going to liver";
  scFSkin = 0.05 UNITLESS; scFSkin is "fraction total blood flow going to skin";
  fSA_exposed = 0.1 UNITLESS; fSA_exposed is "fraction of skin surface area actually exposed";
  Height_sc = 0.0001 DeciM; Height_sc is "thickness stratum corneum";
  Height_vs = 0.0122 DeciM; Height_vs is "thickness viable epidermis";
  Falv = 2220 L_PER_HR; Falv is "alveolar ventilation rate";
  PCFat = 2.53 UNITLESS; PCFat is "partition coefficient fat over blood";
  PCLiver = 0.923 UNITLESS; PCLiver is "partition coefficient liver over blood";
  PCRich = 0.875 UNITLESS; PCRich is "partition coefficient poorly perfused tissue over blood";
  PCPoor = 0.647 UNITLESS; PCPoor is "partition coefficient richly perfused tissue over blood";
  PCSkin_sc = 0.889 UNITLESS; PCSkin_sc is "partition coefficient viable skin over stratum corneum";
  PCSkin = 0.889 UNITLESS; PCSkin is "partition coefficient viable skin over blood";
  PCAir = 1e99 UNITLESS; PCAir is "partition coefficient blood over air";
  kGut = 1 PER_H; kGut is "absorption rate constant gut";
  Kp_sc_vs = 0.01 DeciM_PER_HR; Kp_sc_vs is "diffusion rate from stratum corneum to viable epidermis";
  Km = 0 MilliMOL; Km is "Michaelis-Menten constant liver";
  Michaelis = 0 UNITLESS; Michaelis is "flag for Michaelis-Menten or linear metabolism";
  Vmax = 0 MilliMOL_PER_L_HR; Vmax is "maximum rate of metabolism in the liver";
  CLH = 132 L_PER_HR; CLH is "hepatic clearance rate";
  Ke = 7.5 L_PER_HR; Ke is "renal excretion rate";
  fub = 0.51 UNITLESS; fub is "fraction of chemical unbound in blood";
  f_su has L_PER_HR;
  f_se has L_PER_HR;
  VBlood has L; VBlood is "total blood volume";
  FBlood has L_PER_HR; FBlood is "blood flow";
  FFat has L_PER_HR; FFat is "blood flow to the fat";
  FPoor has L_PER_HR; FPoor is "blood flow to poorly perfused tissues";
  FLiver has L_PER_HR; FLiver is "blood flow to the liver";
  FSkin has L_PER_HR; FSkin is "blood flow to the skin";
  FRich has L_PER_HR; FRich is "blood flow to richly perfused tissues";
  FSkin_e has L_PER_HR; FSkin_e is "blood flow to exposed skin";
  FSkin_u has L_PER_HR; FSkin_u is "blood flow to unexposed skin";

  // Assignment rules:
  Fat := BM*scVFat;
  Rich := BM*scVRich;
  Liver := BM*scVLiver;
  Art := VBlood*scVArt;
  Ven := VBlood - Art;
  Skin_e := BSA*Height_vs*fSA_exposed;
  Skin_u := BSA*Height_vs*(1 - fSA_exposed);
  Skin_sc_e := BSA*Height_sc*fSA_exposed;
  Skin_sc_u := BSA*Height_sc*(1 - fSA_exposed);
  Poor := BM*(1 - scVFat - scVRich - scVLiver - scVBlood - 0.1) - Skin_e - Skin_u - Skin_sc_e - Skin_sc_u;
  f_su := Kp_sc_vs*BSA*(1 - fSA_exposed);
  f_se := Kp_sc_vs*BSA*fSA_exposed;
  VBlood := BM*scVBlood;
  FBlood := scFBlood*BM;
  FFat := FBlood*scFFat;
  FPoor := FBlood*scFPoor;
  FLiver := FBlood*scFLiver;
  FSkin := FBlood*scFSkin;
  FRich := FBlood - FFat - FPoor - FLiver - FSkin;
  FSkin_e := FSkin*fSA_exposed;
  FSkin_u := FSkin - FSkin_e;

  // Reactions:
  _J0: QArt -> QAir; Falv*(QArt/Art)/PCAir;
  _J1: QAir -> QArt; FBlood*(QAir/Air);
  _J2: QArt -> QFat; FFat*(QArt/Art);
  _J3: QFat -> QVen; FFat*(QFat/Fat)/PCFat;
  _J4: QArt -> QRich; FRich*(QArt/Art);
  _J5: QRich -> QVen; FRich*(QRich/Rich)/PCRich;
  _J6: QArt -> QPoor; FPoor*(QArt/Art);
  _J7: QPoor -> QVen; FPoor*(QPoor/Poor)/PCPoor;
  _J8: QArt -> QLiver; FLiver*(QArt/Art);
  _J9: QLiver -> QVen; FLiver*(QLiver/Liver)/PCLiver;
  _J10: QGut -> QLiver; kGut*QGut;
  _J11: QArt -> QSkin_u; FSkin_u*(QArt/Art);
  _J12: QSkin_u -> QVen; FSkin_u*conc(QSkin_u, Skin_u)/PCSkin;
  _J13: QSkin_u -> QSkin_sc_u; f_su*conc(QSkin_u, Skin_u)/PCSkin_sc;
  _J14: QSkin_sc_u -> QSkin_u; f_su*conc(QSkin_sc_u, Skin_sc_u);
  _J15: QArt -> QSkin_e; FSkin_e*(QArt/Art);
  _J16: QSkin_e -> QVen; FSkin_e*conc(QSkin_e, Skin_e)/PCSkin;
  _J17: QSkin_e -> QSkin_sc_e; f_se*conc(QSkin_e, Skin_e)/PCSkin_sc;
  _J18: QSkin_sc_e -> QSkin_e; f_se*conc(QSkin_sc_e, Skin_sc_e);
  _J19: QVen -> QArt; FBlood*(QVen/Ven);
  _J20: QLiver -> QMetab; fub*piecewise(metab_MM(Vmax, Km, PCLiver, QLiver, Liver), Michaelis > 0.5, metab_MA(CLH, PCLiver, QLiver, Liver));
  _J21: QArt -> QExcret; Ke*fub*(QArt/Art);

  // Unit definitions:
  unit MilliMOL = 1e-3 mole;
  unit HR = 3600 second;
  unit L = litre;
  unit KiloGM = 1000 gram;
  unit DeciM2 = (0.1 metre)^2;
  unit DeciM = 0.1 metre;
  unit L_PER_KiloGM = litre / (1000 gram);
  unit UNITLESS = dimensionless;
  unit L_PER_KiloGM_HR = litre / (1000 gram * 3600 second);
  unit L_PER_HR = litre / (3600 second);
  unit MilliMOL_PER_L_HR = 1e-3 mole / (litre * 3600 second);
  unit DeciM_PER_HR = 0.1 metre / (3600 second);
  unit PER_H = 1 / (3600 second);
end
